*Heading
** Unit cube made of 6 C3D10 elements
************************************************
*NODE, NSET=ALLNODES
** Corner nodes
1, 0,0,0
2, 1,0,0
3, 1,1,0
4, 0,1,0
5, 0,0,1
6, 1,0,1
7, 1,1,1
8, 0,1,1
**
** Edge midpoints (12)
9,  0.5,0,0
10, 1,0.5,0
11, 0.5,1,0
12, 0,0.5,0
13, 0.5,0,1
14, 1,0.5,1
15, 0.5,1,1
16, 0,0.5,1
17, 0,0,0.5
18, 1,0,0.5
19, 1,1,0.5
20, 0,1,0.5
**
** Face / diagonal midpoints
21, 0.5,0.5,0
22, 0.5,0.5,1
23, 0.5,0,0.5
24, 0.5,1,0.5
25, 0,0.5,0.5
26, 1,0.5,0.5
27, 0.5,0,0.5
**
** Body/other needed midpoint
29, 0.5,0.5,0.5
30, 0.5,1,0.5
**
************************************************
*ELEMENT, TYPE=C3D10, ELSET=CUBE
**
1, 1,2,3,7, 9,10,21,29,26,19
2, 1,3,4,7, 21,11,12,29,19,30
3, 1,4,8,7, 12,20,25,29,30,15
4, 1,8,5,7, 25,16,17,29,15,22
5, 1,5,6,7, 17,13,27,29,22,14
6, 1,6,2,7, 27,18,9,29,14,26
**
************************************************
*ELSET, ELSET=TETRA
1,2,3,4,5,6
************************************************
*Material, name=mat1
*Depvar
28,
*User Material, constants=15
0, 0, 0, 3, 1.1, 1.0, 1.0, 1.0,
1.0, 1.0, 0.0, 0.0, 0.0, 1.0, 0.0
************************************************
*SOLID SECTION, ELSET=TETRA, MATERIAL=mat1
************************************************
*NSET, NSET=BOTTOM
1,2,3,4,9,10,11,12,21
*NSET, NSET=TOP
5,6,7,8,13,14,15,16,22
************************************************
*BOUNDARY, TYPE=DISPLACEMENT
BOTTOM,1,3,0
************************************************
*STEP, NLGEOM=YES, INC=100000, UNSYMM=YES
*STATIC
0.01,1.0,1e-5,0.01
*BOUNDARY, TYPE=DISPLACEMENT
TOP,3,3,-0.85
**
*NODE PRINT, FREQUENCY=1
U,
RF,
*EL PRINT, ELSET=TETRA, POSITION=INTEGRATION POINTS
S
*EL PRINT, ELSET=TETRA, POSITION=INTEGRATION POINTS
LE
*EL PRINT, ELSET=TETRA, POSITION=INTEGRATION POINTS
SDV
**
*OUTPUT, FIELD, FREQUENCY=1
*ELEMENT OUTPUT, ELSET=TETRA, POSITION=INTEGRATION POINTS
SDV, S, LE
*NODE OUTPUT, NSET=ALLNODES
U
**
*END STEP
