*Heading
** C3D10 single element
*****************************************
*NODE, NSET=ALLNODES
1, 0,0,0
2, 1,0,0
3, 1,1,0
4, 0,1,0
5, 0,0,1
6, 1,0,1
7, 1,1,1
8, 0,1,1
9,  0.5,0,0
10, 1,0.5,0
11, 0.5,1,0
12, 0,0.5,0
13, 0.5,0,1
14, 1,0.5,1
15, 0.5,1,1
16, 0,0.5,1
17, 0,0,0.5
18, 1,0,0.5
19, 1,1,0.5
20, 0,1,0.5
21, 0.5,0.5,0
22, 0.5,0.5,1
23, 0.5,0,0.5
24, 0.5,1,0.5
25, 0,0.5,0.5
26, 1,0.5,0.5
27, 0.5,0.5,0.5
*****************************************
*ELEMENT,TYPE=C3D10
1, 1,2,3,7, 9,10,21,27,26,19
2, 1,3,4,7, 21,11,12,27,19,24
3, 1,4,8,7, 12,20,25,27,24,15
4, 1,8,5,7, 25,16,17,27,15,22
5, 1,5,6,7, 17,13,23,27,22,14
6, 1,6,2,7, 23,18,9,27,14,26
*****************************************
*ELSET, ELSET=TETRA
1,2,3,4,5,6
*****************************************
*Material, name=mat1
*Depvar
150,
*User Material, constants=56, UNSYMM
1, 0,20287.31773171795,20287.31773171795,20287.31773171795,11196.680865188255,11196.680865188255,11196.680865188255,
6022.263038244377,6022.263038244377,6022.263038244377,6.576815591743917e-05,6.576815591743917e-05,6.576815591743917e-05,0.00015595921228296663,0.00015595921228296663,
0.00015595921228296663,-1.841508365688297e-05,-1.841508365688297e-05,-1.841508365688297e-05,0.0009558195515359797,0.0009558195515359797,0.0009558195515359797,0.6520939716161058,
0.4531282633380608,0.3926982943266515,0.3472275124597445,0.30111349230681067,0.2624329767561204,0.22379908640055712,0.21528277765171802,0.1539340050570855,
0.17640891342288406,0.0007,0.007,0.07,0.7,7,70,700,
7000,70000,700000,10,8.0075,0.85,1.5,10.0,
0.02,8.0,1e-12,100,0.0001,0.1,1
*****************************************
*SOLID SECTION, ELSET=TETRA,  MATERIAL=mat1
*****************************************
*NSET, NSET=FIX_123
1
*NSET, NSET=FIX_23
2,9
*NSET, NSET=FIX_3
3,10,11,21
*NSET, NSET=FIX_13
4,12
*NSET, NSET=DISP_FIX_12
5
*NSET, NSET=DISP_FIX_2
6,13
*NSET, NSET=DISP
7,14,15,22
*NSET, NSET=DISP_FIX_1
8,16
*NSET, NSET=INTER_12
17
*NSET, NSET=INTER_2
18,23
*NSET, NSET=INTER_1
20,25
*NSET, NSET=SURFACE
1, 2, 3, 4, 5, 6, 7, 8
*****************************************
*****************************************
*STEP,NLGEOM=YES,INC=100000,UNSYMM=YES
*STATIC
0.01,1.0,1e-5,0.01
*BOUNDARY, TYPE=DISPLACEMENT
FIX_123, 1, 3, 0
FIX_23, 2, 3, 0
FIX_3, 3, 3, 0
FIX_13, 1, 1, 0
FIX_13, 3, 3, 0
**
DISP_FIX_12, 1, 2, 0
DISP_FIX_12, 3, 3, -0.55
DISP_FIX_2, 2, 2, 0
DISP_FIX_2, 3, 3, -0.55
DISP, 3, 3, -0.55
DISP_FIX_1, 1, 1, 0
DISP_FIX_1, 3, 3, -0.55
**
INTER_12, 1, 2, 0
INTER_2, 2, 2, 0
INTER_1, 1, 1, 0
**
*NODE PRINT,FREQUENCY=1
*NODE PRINT,NSET=ALLNODES
U,
RF,
*EL PRINT, ELSET=TETRA, POSITION=INTEGRATION POINTS
S
*EL PRINT, ELSET=TETRA, POSITION=INTEGRATION POINTS
LE
*EL PRINT, ELSET=TETRA, POSITION=INTEGRATION POINTS
SDV
*EL FILE, ELSET=TETRA
SDV
*OUTPUT, HISTORY, FREQUENCY=1
*OUTPUT, HISTORY, FREQUENCY=1
**ELEMENT OUTPUT, ELSET=TETRA
**EVOL,
*OUTPUT, HISTORY, FREQUENCY=1
*NODE OUTPUT, NSET=ALLNODES
U,
RF
*OUTPUT, FIELD, FREQUENCY=1
*ELEMENT OUTPUT, ELSET=TETRA, POSITION=INTEGRATION POINTS
SDV, S, LE
*OUTPUT, FIELD, FREQUENCY=1
*NODE OUTPUT, NSET=ALLNODES
U, RF
*END STEP
