*Heading
** Job name: Sim-Axial_Full_Const Model name: Model-Axial_Full_Const_Y1
** Generated by: Abaqus/CAE 2021.HF6
*Preprint, echo=NO, model=NO, history=NO, contact=NO
**
** PARTS
**
*Part, name=SingleElement
*Node
      1,          10.,          10.,          10.
      2,          10.,           0.,          10.
      3,          10.,          10.,           0.
      4,          10.,           0.,           0.
      5,           0.,          10.,          10.
      6,           0.,           0.,          10.
      7,           0.,          10.,           0.
      8,           0.,           0.,           0.
*Element, type=C3D8
1, 5, 6, 8, 7, 1, 2, 4, 3
*Nset, nset=_PickedSet2, internal, generate
 1,  8,  1
*Elset, elset=_PickedSet2, internal
 1,
** Section: SectionSingleElement
*Solid Section, elset=_PickedSet2, controls=EC-1, material=UMAT_ANISO_QUADRIC_VISCO_SLS_PRIMAL
,
*End Part
**
**
** ASSEMBLY
**
*Assembly, name=Assembly
**
*Instance, name=SingleElement-1, part=SingleElement
*End Instance
**
*Nset, nset=Set-DisplacementFix, instance=SingleElement-1
 1
*Nset, nset=Set-DisplacementFreeX, instance=SingleElement-1
 5
*Nset, nset=Set-DisplacementFreeY, instance=SingleElement-1
 3
*Nset, nset=Set-DisplacementFreeXY, instance=SingleElement-1
 7
*Nset, nset=Set-FixationFix, instance=SingleElement-1
 2
*Nset, nset=Set-FixationFreeX, instance=SingleElement-1
 6
*Nset, nset=Set-FixationFreeY, instance=SingleElement-1
 4
*Nset, nset=Set-FixationFreeXY, instance=SingleElement-1
 8
*Elset, elset=Set-SE, instance=SingleElement-1
 1
*End Assembly
**
** ELEMENT CONTROLS
**
*Section Controls, name=EC-1, ELEMENT DELETION=NO
1., 1., 1.
**
** MATERIALS
**
*Material, name=UMAT_ANISO_QUADRIC_VISCO_SLS_PRIMAL
*Depvar
150,
*User Material, constants=56, UNSYMM
1, 0,20287.31773171795,20287.31773171795,20287.31773171795,11196.680865188255,11196.680865188255,11196.680865188255,
6022.263038244377,6022.263038244377,6022.263038244377,6.576815591743917e-05,6.576815591743917e-05,6.576815591743917e-05,0.00015595921228296663,0.00015595921228296663,
0.00015595921228296663,-1.841508365688297e-05,-1.841508365688297e-05,-1.841508365688297e-05,0.0009558195515359797,0.0009558195515359797,0.0009558195515359797,0.6520939716161058,
0.4531282633380608,0.3926982943266515,0.3472275124597445,0.30111349230681067,0.2624329767561204,0.22379908640055712,0.21528277765171802,0.1539340050570855,
0.17640891342288406,0.0007,0.007,0.07,0.7,7,70,700,
7000,70000,700000,10,8.0075,0.85,1.5,10.0,
0.02,8.0,1e-12,100,0.0001,0.1,1
** ----------------------------------------------------------------
** STEP: Displacement
**
*Step, name=Displacement, nlgeom=YES, inc=10500, convert sdi=NO
*Visco, cetol=0.001
0.0001, 0.01, 0.0001, 0.0001
**
** BOUNDARY CONDITIONS
**
** Name: Displacement-Y Type: Displacement/Rotation
*Boundary
Set-DisplacementFix, 1, 1, 0
Set-DisplacementFix, 2, 2, -0.1
Set-DisplacementFix, 3, 3, 0
*Boundary
Set-DisplacementFreeX, 2, 2, -0.1
Set-DisplacementFreeX, 3,3
*Boundary
Set-DisplacementFreeY, 2, 2, -0.1
Set-DisplacementFreeY, 1,1
*Boundary
Set-DisplacementFreeXY, 2, 2, -0.1

** Name: Fixation Type: Displacement/Rotation
*Boundary
Set-FixationFix, 1, 1
Set-FixationFix, 2, 2
Set-FixationFix, 3, 3

Set-FixationFreeX, 2, 2
Set-FixationFreeX, 3,3

Set-FixationFreeY, 2, 2
Set-FixationFreeY, 1,1

Set-FixationFreeXY, 2, 2

**
** OUTPUT REQUESTS
**
*Restart, write, frequency=0
**
** FIELD OUTPUT: F-Output-1
**
*Output, field, variable=PRESELECT, frequency=10
*EL PRINT, ELSET = Set-SE, Position = Integration Points, summary = NO
E
*EL PRINT, ELSET = Set-SE, Position = Integration Points, summary = NO
S
*EL PRINT, ELSET = Set-SE, Position = Integration Points, summary = NO
DG
*EL PRINT, ELSET = Set-SE, Position = Integration Points, summary = NO
SDV
**
** HISTORY OUTPUT: H-Output-1
**
*Output, history, variable=PRESELECT, frequency=10
*End Step
**
