*Heading
** C3D10 single element
*****************************************
*NODE, NSET=ALLNODES
1, 0.0, 0.0, 0.0
2, 1.0, 0.0, 0.0
3, 0.0, 1.0, 0.0
4, 0.0, 0.0, 1.0
5, 0.5, 0.0, 0.0
6, 0.5, 0.5, 0.0
7, 0.0, 0.5, 0.0
8, 0.0, 0.0, 0.5
9, 0.5, 0.0, 0.5
10, 0.0, 0.5, 0.5
*****************************************
*USER ELEMENT, TYPE=U1, NODES=10, COORDINATES=3, PROPERTIES=15,
VARIABLES=172, UNSYMM
1,2,3
1,11
5,
*****************************************
*ELEMENT,TYPE=U1,ELSET=TETRA
1, 1,  2, 3, 4, 5, 6, 7, 8, 9, 10
*****************************************
*UEL PROPERTY,  elset=TETRA
**0, 0, 0, 3, 1.1, 0.18273475895527272, 1.1001624269936399,
**1.0518177747725455, 0.84801979823381446, 0.0291708, 0.94012, 0.339594,
**0.563138, 0.265235, -0.78264
0, 0, 0, 3, 1.1, 1.0, 1.0, 1.0,
1.0, 1.0, 0.0, 0.0, 0.0, 1.0, 0.0
*****************************************
*NSET, NSET=BOTTOM
 1, 2, 3, 5, 6, 7
*NSET, NSET=TOP
 4
*NSET, NSET=SURFACE
 1, 2, 3, 4
*****************************************
** BOUNDARY CONDITIONS
*BOUNDARY, TYPE=DISPLACEMENT
BOTTOM, 1, 3, 0
**TOP, 1, 2, 0
*****************************************
*STEP,NLGEOM=YES,INC=100000,UNSYMM=YES
STEP 1:
*COUPLED TEMPERATURE-DISPLACEMENT, STEADY STATE
**STATIC
0.01,1.0,1e-5,0.01
*BOUNDARY, TYPE=DISPLACEMENT
TOP, 3, 3, -0.85
** NEUMANN BOUNDARY
*CFLUX
SURFACE,11,0
**
*EL PRINT,FREQUENCY=1,POSITION=INTEGRATION POINTS
SDV8, SDV51, SDV94, SDV137
*NODE PRINT,FREQUENCY=1
*NODE PRINT,NSET=TOP
U,
RF,
*OUTPUT,FIELD, FREQUENCY=1
*NODE OUTPUT, NSET=ALLNODES
U,
RF,
*ELEMENT OUTPUT, ELSET=TETRA
SDV
*NODE FILE, NSET=TOP
U,
RF,
*EL FILE, ELSET=TETRA,POSITION=INTEGRATION POINTS
SDV
*OUTPUT, HISTORY, FREQUENCY=1
*NODE OUTPUT, NSET=TOP
U,
RF,
*OUTPUT, HISTORY, FREQUENCY=1
**ELEMENT OUTPUT, ELSET=TETRA
**EVOL,
*OUTPUT, HISTORY, FREQUENCY=1
*NODE OUTPUT, NSET=ALLNODES
U,
RF,
*END STEP
